TwoParCalibrationStudy LeftCal1Hip(
  BodyModelRef = Main.HumanModel.BodyModel,
  Side = Left,
  HIP = On
) = {
  nStep = NumElemOf(HipPositions);

  MuscleArr = ObjSearch(
  &..BodyModel.Left.Leg.Mus,
  {
    "AdductorBrevis*.*",
    "AdductorLong*.*",
    "AdductorMagnus*.*",
    "Gemellus.*",
    "Gluteus*.*",
    "Iliacus*.*",
    "Obturator*.*",
    "Pectineus.*",
    "Piriformis.*",
    "QuadratusFemoris.*",
  },
  "AnyMuscle"
  );

  HipPositions = repmat(2, flattenptr(&.RangeOfMotion.Left.Leg.Hip.ActiveRoM));
};

TwoParCalibrationStudy LeftCal2HipSpine(
  BodyModelRef = Main.HumanModel.BodyModel,
  Side = Left,
  HIP = On,
  TRUNKFLEXION = On,
  TRUNKLATERALBENDING = On,
  TRUNKROTATION = On,
) = {
  nStep = NumElemOf(HipPositions);

  MuscleArr = ObjSearch(
  &..BodyModel.Trunk.Muscles.Left,
  {
    "Psoas*.*",
  },
  "AnyMuscle"
  );

  HipPositions = repmat(2, flattenptr(&.RangeOfMotion.Left.Leg.Hip.Neutral));
  TrunkFlexionPositions = repmat(2, flattenptr(&.RangeOfMotion.Trunk.Neutral));
  TrunkLateralBendingPositions = repmat(2, flattenptr(&.RangeOfMotion.Trunk.Neutral));
  TrunkRotationPositions = repmat(2, flattenptr(&.RangeOfMotion.Trunk.Neutral));
};

TwoParCalibrationStudy LeftCal3HipKnee(
  BodyModelRef = Main.HumanModel.BodyModel,
  Side = Left,
  HIP = On,
  KNEE = On,
) = {
  nStep = NumElemOf(HipPositions);

  MuscleArr = ObjSearch(
  &..BodyModel.Left.Leg.Mus,
  {
    "BicepsFemorisCaputLongum.*",
    "Gracilis.*",
    "RectusFem*.*",
    "Sartorius.*",
    "Semimembranosus.*",
    "Semitendinosus.*",
    "TensorFasciaeLatae.*",
  },
  "AnyMuscle"
  );

  HipPositions = repmat(2, flattenptr(&.RangeOfMotion.Left.Leg.Hip.ActiveRoM));
  KneePositions = repmat(10, flattenptr(&.RangeOfMotion.Left.Leg.Knee.ActiveRoM));
};

TwoParCalibrationStudy LeftCal4Knee(
  BodyModelRef = Main.HumanModel.BodyModel,
  Side = Left,
  KNEE = On,
) = {
  nStep = NumElemOf(KneePositions);

  MuscleArr = ObjSearch(
  &..BodyModel.Left.Leg.Mus,
  {
    "BicepsFemorisCaputBreve.*",
    "Popliteus.*",
    "Vastus*.*",
  },
  "AnyMuscle"
  );

  KneePositions = repmat(2, flattenptr(&.RangeOfMotion.Left.Leg.Knee.ActiveRoM));
};

TwoParCalibrationStudy LeftCal5AnkleKnee(
  BodyModelRef = Main.HumanModel.BodyModel,
  Side = Left,
  KNEE = On,
  ANKLE = On,
) = {
  nStep = NumElemOf(AnklePositions);

  MuscleArr = ObjSearch(
  &..BodyModel.Left.Leg.Mus,
  {
    "Gastroc*.*",
    "Peroneus*.*",
    "Plantaris.*",
  },
  "AnyMuscle"
  );

  KneePositions = repmat(3, flattenptr(&.RangeOfMotion.Left.Leg.Knee.ActiveRoM));
  AnklePositions = repmat(2, flattenptr(&.RangeOfMotion.Left.Leg.Ankle.ActiveRoMFlexion));
};

TwoParCalibrationStudy LeftCal6Ankle(
  BodyModelRef = Main.HumanModel.BodyModel,
  Side = Left,
  ANKLE = On,
  SUBTALAR = On,
) = {
  nStep = NumElemOf(AnklePositions);
  MuscleArr = ObjSearch(
  &..BodyModel.Left.Leg.Mus,
  {
    "Extensor*.*",
    "Flexor*.*",
    "Soleus*.*",
    "Tibialis*.*",
  },
  "AnyMuscle"
  );

  AnklePositions = repmat(3, flattenptr(&.RangeOfMotion.Left.Leg.Ankle.ActiveRoMFlexion));
  SubTalarPositions = repmat(3, flattenptr(&.RangeOfMotion.Left.Leg.Ankle.ActiveRoMEversion));
};


CalibrationSequence = {
  AnyOperation &LegCal1Left = .LeftCal1Hip.FiberAndTendonLengthAdjustment;
  AnyOperation &LegCal2Left = .LeftCal2HipSpine.FiberAndTendonLengthAdjustment;
  AnyOperation &LegCal3Left = .LeftCal3HipKnee.FiberAndTendonLengthAdjustment;
  AnyOperation &LegCal4Left = .LeftCal4Knee.FiberAndTendonLengthAdjustment;
  AnyOperation &LegCal5Left = .LeftCal5AnkleKnee.FiberAndTendonLengthAdjustment;
  AnyOperation &LegCal6Left = .LeftCal6Ankle.FiberAndTendonLengthAdjustment;
};
